// SBML level 3 version 1
// dcterms:bibliographicCitation: urn:miriam:pubmed:6224784
// dcterms:bibliographicCitation: values used urn:miriam:pubmed:17402747
// dcterms:bibliographicCitation: urn:miriam:doi:10.1016/0003-9861(67)90262-7
// dcterms:bibliographicCitation: Keq urn:miriam:pubmed:16118205
// dcterms:bibliographicCitation: urn:miriam:pubmed:4340699
// dcterms:bibliographicCitation: Km urn:miriam:pubmed:26385918
// dcterms:bibliographicCitation: urn:miriam:doi:10.1016/S0163-7258(00)00097-8
// dcterms:bibliographicCitation: original work calf Km and kcat calculated with MW of 92kDa urn:miriam:pubmed:9030766
// dcterms:bibliographicCitation: Km from recombinant human enzyme, similar to mouse Km urn:miriam:pubmed:8182091
// dcterms:bibliographicCitation: turnover calculated from enzyme 1300 fold purified from porcine liver, Km=0.83 urn:miriam:pubmed:2963591
// dcterms:bibliographicCitation: urn:miriam:doi:10.1021/bi049592e
// dcterms:bibliographicCitation: Km 0.033 and Kcat 8.5 urn:miriam:pubmed:3036844
// dcterms:bibliographicCitation: used values urn:miriam:pubmed:22229411
// dcterms:bibliographicCitation: Vmax of purified anzyme and Km for NR urn:miriam:pubmed:19027704

function TwosubstratesMMs2constant(E_T, turnover, s1, s2, scaling, Km)
  E_T*turnover*s1*s2*scaling/(Km + s1);
end

function Constant_flux__irreversible(v)
  v;
end
Constant_flux__irreversible is "Constant flux (irreversible)";

function Product_inhibition_two_susbtrates_s2_const_scaling(ET, scaling, Kcat, S1, S2, Km, I, Ki)
  ET*scaling*Kcat*S1*S2/((Km + S1)*(1 + I/Ki));
end

function Competitie_inhibition_two_substrates_s2_const_scaling(E_T, scaling, kcat_A, A, Km_A, kcat_PA, PA, Km_PA, B, Km_B, PB, Km_PB)
  E_T*scaling*(kcat_A*A/Km_A - kcat_PA*PA/Km_PA)/(1 + A/Km_A + B/Km_B + PA/Km_PA + PB/Km_PB);
end

function Competitive_inhibition_scaling(ET, scaling, Kcat, S, Km, I, Ki)
  ET*scaling*Kcat*S/(Km + S + Km*I/Ki);
end

function Product_inhibition_scaling(ET, scaling, Kcat, S, Km, I, Ki)
  ET*scaling*Kcat*S/(Km + S + Km*I/Ki);
end

function MM_with_ET_and_scaling(ET, scaling, kcat, S, Km)
  ET*scaling*kcat*S/(Km + S);
end

model New_Model()
  // NAD Phylogeny
  // model units - substance: substance, time: time, volume: volume, area: area, length: length, extent: substance

  // Compartments:
  compartment Copartment_NamPT = 0.001 volume;
  compartment Compartment_NADA = 0.001 volume;

  // Species:
  species $Gln_Copartment_NamPT in Copartment_NamPT;
  species $DNA_damage_Copartment_NamPT in Copartment_NamPT;
  species $DNA_ADPR_Copartment_NamPT in Copartment_NamPT;
  species NADbound_Copartment_NamPT in Copartment_NamPT;
  species $H3_ac_Copartment_NamPT in Copartment_NamPT;
  species $H3_deac_Copartment_NamPT in Copartment_NamPT;
  species $Glu_Copartment_NamPT in Copartment_NamPT;
  species NR_Copartment_NamPT in Copartment_NamPT;
  species $Pi_Copartment_NamPT in Copartment_NamPT;
  species NAR_copy_Copartment_NamPT in Copartment_NamPT;
  species NAM_copy_Copartment_NamPT in Copartment_NamPT;
  species NaAD_Copartment_NamPT in Copartment_NamPT;
  species $_1_methyl_NAM_Copartment_NamPT in Copartment_NamPT; _1_methyl_NAM_Copartment_NamPT is "1-methyl-NAM";
  species $H2O_Copartment_NamPT in Copartment_NamPT;
  species $PPi_Copartment_NamPT in Copartment_NamPT;
  species $AMP_Copartment_NamPT in Copartment_NamPT;
  species NMN_Copartment_NamPT in Copartment_NamPT;
  species NA_Copartment_NamPT in Copartment_NamPT;
  species NaMN_Copartment_NamPT in Copartment_NamPT;
  species $ADP_Copartment_NamPT in Copartment_NamPT;
  species $SAM_Copartment_NamPT in Copartment_NamPT;
  species $SAH_Copartment_NamPT in Copartment_NamPT;
  species NAM_Copartment_NamPT in Copartment_NamPT;
  species NAD_Copartment_NamPT in Copartment_NamPT;
  species NAR_Copartment_NamPT in Copartment_NamPT;
  species $PRPP_Copartment_NamPT in Copartment_NamPT;
  species $ATP_Copartment_NamPT in Copartment_NamPT;
  species $Gln_Compartment_NADA in Compartment_NADA;
  species $DNA_damage_Compartment_NADA in Compartment_NADA;
  species $DNA_ADPR_Compartment_NADA in Compartment_NADA;
  species NADbound_Compartment_NADA in Compartment_NADA;
  species $H3_ac_Compartment_NADA in Compartment_NADA;
  species $H3_deac_Compartment_NADA in Compartment_NADA;
  species $Glu_Compartment_NADA in Compartment_NADA;
  species NR_Compartment_NADA in Compartment_NADA;
  species $Pi_Compartment_NADA in Compartment_NADA;
  species NAR_copy_Compartment_NADA in Compartment_NADA;
  species NAM_copy_Compartment_NADA in Compartment_NADA;
  species NaAD_Compartment_NADA in Compartment_NADA;
  species $_1_methyl_NAM_Compartment_NADA in Compartment_NADA; _1_methyl_NAM_Compartment_NADA is "1-methyl-NAM";
  species $H2O_Compartment_NADA in Compartment_NADA;
  species $PPi_Compartment_NADA in Compartment_NADA;
  species $AMP_Compartment_NADA in Compartment_NADA;
  species NMN_Compartment_NADA in Compartment_NADA;
  species NA_Compartment_NADA in Compartment_NADA;
  species NaMN_Compartment_NADA in Compartment_NADA;
  species $ADP_Compartment_NADA in Compartment_NADA;
  species $SAM_Compartment_NADA in Compartment_NADA;
  species $SAH_Compartment_NADA in Compartment_NADA;
  species NAM_Compartment_NADA in Compartment_NADA;
  species NAD_Compartment_NADA in Compartment_NADA;
  species NAR_Compartment_NADA in Compartment_NADA;
  species $PRPP_Compartment_NADA in Compartment_NADA;
  species $ATP_Compartment_NADA in Compartment_NADA;
  species Nam_ex in Compartment_NADA;

  // Parameters:
  scaling = 0.001;
  Nam_transporter = 100;
  Km_NamPT = 5e-6;
  Kcat_NamPT = 0.0077;
  cell_devision_all = 2.8e-5;
  ModelValue_8_0 = cell_devision_all; ModelValue_8_0 is "Initial for cell devision all";

  // Assignment rules:
  celldivision_compartment_NamPT := ModelValue_8_0;
  celldivision_compartment_NADA := ModelValue_8_0;

  // Reactions:
  NMN_efflux_0: NMN_Copartment_NamPT => ; Copartment_NamPT*celldivision_compartment_NamPT*NMN_Copartment_NamPT; NMN_efflux_0 is "NMN-efflux[0]";
  NAPRT_0: NA_Copartment_NamPT + $ATP_Copartment_NamPT + $PRPP_Copartment_NamPT => NaMN_Copartment_NamPT + $ADP_Copartment_NamPT + $PPi_Copartment_NamPT; Copartment_NamPT*TwosubstratesMMs2constant(NAPRT_0_E_T, NAPRT_0_turnover, NA_Copartment_NamPT, ATP_Copartment_NamPT, NAPRT_0_scaling, NAPRT_0_Km); NAPRT_0 is "NAPRT[0]";  // ec-code:2.4.2.11; isDescribedBy pubmed:6224784
    NAPRT_0_E_T = 10; NAPRT_0_turnover = 3.3; NAPRT_0_scaling = 0.001; NAPRT_0_Km = 0.00015;
  NMNAT1_NMN_0: NMN_Copartment_NamPT + $ATP_Copartment_NamPT -> NAD_Copartment_NamPT + $PPi_Copartment_NamPT; Copartment_NamPT*Competitie_inhibition_two_substrates_s2_const_scaling(NMNAT1_NMN_0_E_T, NMNAT1_NMN_0_scaling, NMNAT1_NMN_0_kcat_A, NMN_Copartment_NamPT, NMNAT1_NMN_0_Km_A, NMNAT1_NMN_0_kcat_PA, NAD_Copartment_NamPT, NMNAT1_NMN_0_Km_PA, NaMN_Copartment_NamPT, NMNAT1_NMN_0_Km_B, NaAD_Copartment_NamPT, NMNAT1_NMN_0_Km_PB); NMNAT1_NMN_0 is "NMNAT1-NMN[0]";  // modifiers: NaMN_Copartment_NamPT, NaAD_Copartment_NamPT
    NMNAT1_NMN_0_E_T = 100; NMNAT1_NMN_0_scaling = 0.001; NMNAT1_NMN_0_kcat_A = 53.8; NMNAT1_NMN_0_Km_A = 0.0223; NMNAT1_NMN_0_kcat_PA = 129.1; NMNAT1_NMN_0_Km_PA = 0.059; NMNAT1_NMN_0_Km_B = 0.0677; NMNAT1_NMN_0_Km_PB = 0.502;
  NMNAT1_NaMN_0: NaMN_Copartment_NamPT -> NaAD_Copartment_NamPT; Copartment_NamPT*Competitie_inhibition_two_substrates_s2_const_scaling(NMNAT1_NaMN_0_E_T, NMNAT1_NaMN_0_scaling, NMNAT1_NaMN_0_kcat_A, NaMN_Copartment_NamPT, NMNAT1_NaMN_0_Km_A, NMNAT1_NaMN_0_kcat_PA, NaAD_Copartment_NamPT, NMNAT1_NaMN_0_Km_PA, NMN_Copartment_NamPT, NMNAT1_NaMN_0_Km_B, NAD_Copartment_NamPT, NMNAT1_NaMN_0_Km_PB); NMNAT1_NaMN_0 is "NMNAT1-NaMN[0]";  // modifiers: NMN_Copartment_NamPT, NAD_Copartment_NamPT; ec-code:2.7.7.18; ec-code:2.7.7.1; isDescribedBy pubmed:16118205; isDescribedBy pubmed:17402747
    NMNAT1_NaMN_0_E_T = 100; NMNAT1_NaMN_0_scaling = 0.001; NMNAT1_NaMN_0_kcat_A = 42.9; NMNAT1_NaMN_0_Km_A = 0.0677; NMNAT1_NaMN_0_kcat_PA = 103.8; NMNAT1_NaMN_0_Km_PA = 0.502; NMNAT1_NaMN_0_Km_B = 22.3; NMNAT1_NaMN_0_Km_PB = 0.059;
  NADS_0: NaAD_Copartment_NamPT + $ATP_Copartment_NamPT + $Gln_Copartment_NamPT + $H2O_Copartment_NamPT => $Glu_Copartment_NamPT + NAD_Copartment_NamPT + $PPi_Copartment_NamPT + $AMP_Copartment_NamPT; Copartment_NamPT*TwosubstratesMMs2constant(NADS_0_E_T, NADS_0_turnover, NaAD_Copartment_NamPT, ATP_Copartment_NamPT, NADS_0_scaling, NADS_0_Km); NADS_0 is "NADS[0]";  // ec-code:6.3.5.1; isDescribedBy pubmed:4340699
    NADS_0_E_T = 10; NADS_0_turnover = 21; NADS_0_scaling = 0.001; NADS_0_Km = 0.19;
  // KM and Kcat for CN-III
  NT5_NMN_0: NMN_Copartment_NamPT + $H2O_Copartment_NamPT => NR_Copartment_NamPT; Copartment_NamPT*MM_with_ET_and_scaling(NT5_NMN_0_ET, NT5_NMN_0_scaling, NT5_NMN_0_kcat, NMN_Copartment_NamPT, NT5_NMN_0_Km); NT5_NMN_0 is "NT5-NMN[0]";  // isDescribedBy pubmed:26385918
    NT5_NMN_0_ET = 10; NT5_NMN_0_scaling = 0.001; NT5_NMN_0_kcat = 0.5; NT5_NMN_0_Km = 5;
  PNP_NR_0: NR_Copartment_NamPT + $Pi_Copartment_NamPT => NAM_Copartment_NamPT; Copartment_NamPT*TwosubstratesMMs2constant(PNP_NR_0_E_T, PNP_NR_0_turnover, NR_Copartment_NamPT, Pi_Copartment_NamPT, PNP_NR_0_scaling, PNP_NR_0_Km); PNP_NR_0 is "PNP-NR[0]";  // modifiers: NAR_Copartment_NamPT; isDescribedBy doi:10.1016/S0163-7258(00)00097-8; isDescribedBy pubmed:9030766
    PNP_NR_0_E_T = 10; PNP_NR_0_turnover = 40; PNP_NR_0_scaling = 0.001; PNP_NR_0_Km = 1.48;
  NNMT_0: NAM_Copartment_NamPT + $SAM_Copartment_NamPT => $_1_methyl_NAM_Copartment_NamPT + $SAH_Copartment_NamPT; Copartment_NamPT*Product_inhibition_scaling(NNMT_0_ET, NNMT_0_scaling, NNMT_0_Kcat, NAM_Copartment_NamPT, NNMT_0_Km, _1_methyl_NAM_Copartment_NamPT, NNMT_0_Ki); NNMT_0 is "NNMT[0]";  // brenda:441255; ec-code:2.1.1.1; isDescribedBy pubmed:8182091; isDescribedBy pubmed:2963591
    NNMT_0_ET = 0; NNMT_0_scaling = 0.001; NNMT_0_Kcat = 8.1; NNMT_0_Km = 0.4; NNMT_0_Ki = 0.06;
  Nam_efflux_0: NAM_Copartment_NamPT => ; Copartment_NamPT*celldivision_compartment_NamPT*NAM_Copartment_NamPT; Nam_efflux_0 is "Nam-efflux[0]";
  // Km and Kcat from CN-II
  NT5_NaMN_0: NaMN_Copartment_NamPT + $H2O_Copartment_NamPT => NAR_Copartment_NamPT; Copartment_NamPT*MM_with_ET_and_scaling(NT5_NaMN_0_ET, NT5_NaMN_0_scaling, NT5_NaMN_0_kcat, NaMN_Copartment_NamPT, NT5_NaMN_0_Km); NT5_NaMN_0 is "NT5-NaMN[0]";  // isDescribedBy pubmed:26385918
    NT5_NaMN_0_ET = 10; NT5_NaMN_0_scaling = 0.001; NT5_NaMN_0_kcat = 2.8; NT5_NaMN_0_Km = 3.5;
  SIRT_0: NAD_Copartment_NamPT + $H3_ac_Copartment_NamPT => NAM_Copartment_NamPT + $H3_deac_Copartment_NamPT; Copartment_NamPT*Product_inhibition_two_susbtrates_s2_const_scaling(SIRT_0_ET, SIRT_0_scaling, SIRT_0_Kcat, NAD_Copartment_NamPT, H3_ac_Copartment_NamPT, SIRT_0_Km, NAM_Copartment_NamPT, SIRT_0_Ki); SIRT_0 is "SIRT[0]";  // isDescribedBy doi:10.1021/bi049592e
    SIRT_0_ET = 10; SIRT_0_scaling = 0.001; SIRT_0_Kcat = 0.67; SIRT_0_Km = 0.029; SIRT_0_Ki = 0.06;
  NAD_consumption_without_Nam_inhibition_0: NAD_Copartment_NamPT => NAM_Copartment_NamPT; Copartment_NamPT*MM_with_ET_and_scaling(NAD_consumption_without_Nam_inhibition_0_ET, NAD_consumption_without_Nam_inhibition_0_scaling, NAD_consumption_without_Nam_inhibition_0_kcat, NAD_Copartment_NamPT, NAD_consumption_without_Nam_inhibition_0_Km); NAD_consumption_without_Nam_inhibition_0 is "NAD-consumption without Nam inhibition[0]";
    NAD_consumption_without_Nam_inhibition_0_ET = 0; NAD_consumption_without_Nam_inhibition_0_scaling = 0.001; NAD_consumption_without_Nam_inhibition_0_kcat = 1; NAD_consumption_without_Nam_inhibition_0_Km = 1;
  NADA_0: NAM_Copartment_NamPT + $H2O_Copartment_NamPT => NA_Copartment_NamPT; Copartment_NamPT*Product_inhibition_scaling(NADA_0_ET, NADA_0_scaling, NADA_0_Kcat, NAM_Copartment_NamPT, NADA_0_Km, NA_Copartment_NamPT, NADA_0_Ki); NADA_0 is "NADA[0]";  // isPartOf ec-code:3.5.1.19; isDescribedBy pubmed:22229411; isDescribedBy pubmed:3036844
    NADA_0_ET = 0; NADA_0_scaling = 0.001; NADA_0_Kcat = 0.69; NADA_0_Km = 0.009; NADA_0_Ki = 0.1;
  // cell size HeLa 3e-12 l
  // fibro blast 1e-12l
  // maximal E. coli uptake NA http://www.jbc.org/content/248/14/5144.full.pdf 630 molceules per cell and s
  // thus approx. 1 miktoM/ls
  // HeLa (epithelial; 8.2 ± 0.3 fmol/10 min),
  // NIH-3T3 cells : The apparent Km of NAD transport was ∼190 μM while the Vmax was 429 pmol/well/10 min.
  // http://www.jbc.org/content/283/10/6367.full
  // (1.2e6 cells per well according to thermo fisher cell culture specifications)
  // thus approx. 0.2 mikroM/s
  // 15mg uptake per 60kg body = 2.5e-8 mmol/ls
  NAM_import_0: Nam_ex -> NAM_Copartment_NamPT; Copartment_NamPT*(Nam_transporter*Nam_ex - Nam_transporter*NAM_Copartment_NamPT); NAM_import_0 is "NAM import[0]";
  NAMPT_0: NAM_Copartment_NamPT + $PRPP_Copartment_NamPT => NMN_Copartment_NamPT + $Pi_Copartment_NamPT; Copartment_NamPT*Competitive_inhibition_scaling(NAMPT_0_ET, NAMPT_0_scaling, Kcat_NamPT, NAM_Copartment_NamPT, Km_NamPT, NAD_Copartment_NamPT, NAMPT_0_Ki); NAMPT_0 is "NAMPT[0]";  // modifiers: NAD_Copartment_NamPT
    NAMPT_0_ET = 100; NAMPT_0_scaling = 0.001; NAMPT_0_Ki = 0.0021;
  NAR_efflux_0: NAR_Copartment_NamPT => ; Copartment_NamPT*celldivision_compartment_NamPT*NAR_Copartment_NamPT; NAR_efflux_0 is "NAR-efflux[0]";
  NA_efflux_0: NA_Copartment_NamPT => ; Copartment_NamPT*celldivision_compartment_NamPT*NA_Copartment_NamPT; NA_efflux_0 is "NA-efflux[0]";
  NAD_binding_0: NAD_Copartment_NamPT -> NADbound_Copartment_NamPT; Copartment_NamPT*(NAD_binding_0_k1*NAD_Copartment_NamPT - NAD_binding_0_k2*NADbound_Copartment_NamPT); NAD_binding_0 is "NAD-binding[0]";
    NAD_binding_0_k1 = 1; NAD_binding_0_k2 = 0.1;
  // Kcat calculated from vmax of purified enzyme (600nmol/min*mg) using an MW of 23193 g/mol for NMN
  NRK1_NaMN_0: NAR_Copartment_NamPT => NaMN_Copartment_NamPT; Copartment_NamPT*MM_with_ET_and_scaling(NRK1_NaMN_0_ET, NRK1_NaMN_0_scaling, NRK1_NaMN_0_kcat, NAR_Copartment_NamPT, NRK1_NaMN_0_Km); NRK1_NaMN_0 is "NRK1-NaMN[0]";  // modifiers: NR_Copartment_NamPT; isDescribedBy pubmed:19027704
    NRK1_NaMN_0_ET = 10; NRK1_NaMN_0_scaling = 0.001; NRK1_NaMN_0_kcat = 0.23; NRK1_NaMN_0_Km = 0.0034;
  // Parameter have to be adjusted for NAR...currently NR affinities are used
  PNP_NAR_0: NAR_Copartment_NamPT + $Pi_Copartment_NamPT => NA_Copartment_NamPT; Copartment_NamPT*TwosubstratesMMs2constant(PNP_NAR_0_E_T, PNP_NAR_0_turnover, NAR_Copartment_NamPT, Pi_Copartment_NamPT, PNP_NAR_0_scaling, PNP_NAR_0_Km); PNP_NAR_0 is "PNP-NAR[0]";  // modifiers: NR_Copartment_NamPT; isDescribedBy doi:10.1016/S0163-7258(00)00097-8; isDescribedBy pubmed:9030766
    PNP_NAR_0_E_T = 10; PNP_NAR_0_turnover = 40; PNP_NAR_0_scaling = 0.001; PNP_NAR_0_Km = 1.48;
  NR_efflux_0: NR_Copartment_NamPT => ; Copartment_NamPT*celldivision_compartment_NamPT*NR_Copartment_NamPT; NR_efflux_0 is "NR-efflux[0]";
  // Kcat calculated from vmax of purified enzyme (600nmol/min*mg) using an MW of 23193 g/mol
  NRK1_NMN_0: NR_Copartment_NamPT => NMN_Copartment_NamPT; Copartment_NamPT*MM_with_ET_and_scaling(NRK1_NMN_0_ET, NRK1_NMN_0_scaling, NRK1_NMN_0_kcat, NR_Copartment_NamPT, NRK1_NMN_0_Km); NRK1_NMN_0 is "NRK1-NMN[0]";  // modifiers: NAR_Copartment_NamPT; isDescribedBy pubmed:19027704
    NRK1_NMN_0_ET = 10; NRK1_NMN_0_scaling = 0.001; NRK1_NMN_0_kcat = 0.23; NRK1_NMN_0_Km = 0.0034;
  NMN_efflux_1: NMN_Compartment_NADA => ; Compartment_NADA*celldivision_compartment_NADA*NMN_Compartment_NADA; NMN_efflux_1 is "NMN-efflux[1]";
  NAPRT_1: NA_Compartment_NADA + $ATP_Compartment_NADA + $PRPP_Compartment_NADA => NaMN_Compartment_NADA + $ADP_Compartment_NADA + $PPi_Compartment_NADA; Compartment_NADA*TwosubstratesMMs2constant(NAPRT_1_E_T, NAPRT_1_turnover, NA_Compartment_NADA, ATP_Compartment_NADA, NAPRT_1_scaling, NAPRT_1_Km); NAPRT_1 is "NAPRT[1]";  // ec-code:2.4.2.11; isDescribedBy pubmed:6224784
    NAPRT_1_E_T = 10; NAPRT_1_turnover = 3.3; NAPRT_1_scaling = 0.001; NAPRT_1_Km = 0.00015;
  NMNAT1_NMN_1: NMN_Compartment_NADA + $ATP_Compartment_NADA -> NAD_Compartment_NADA + $PPi_Compartment_NADA; Compartment_NADA*Competitie_inhibition_two_substrates_s2_const_scaling(NMNAT1_NMN_1_E_T, NMNAT1_NMN_1_scaling, NMNAT1_NMN_1_kcat_A, NMN_Compartment_NADA, NMNAT1_NMN_1_Km_A, NMNAT1_NMN_1_kcat_PA, NAD_Compartment_NADA, NMNAT1_NMN_1_Km_PA, NaMN_Compartment_NADA, NMNAT1_NMN_1_Km_B, NaAD_Compartment_NADA, NMNAT1_NMN_1_Km_PB); NMNAT1_NMN_1 is "NMNAT1-NMN[1]";  // modifiers: NaMN_Compartment_NADA, NaAD_Compartment_NADA
    NMNAT1_NMN_1_E_T = 100; NMNAT1_NMN_1_scaling = 0.001; NMNAT1_NMN_1_kcat_A = 53.8; NMNAT1_NMN_1_Km_A = 0.0223; NMNAT1_NMN_1_kcat_PA = 129.1; NMNAT1_NMN_1_Km_PA = 0.059; NMNAT1_NMN_1_Km_B = 0.0677; NMNAT1_NMN_1_Km_PB = 0.502;
  NMNAT1_NaMN_1: NaMN_Compartment_NADA -> NaAD_Compartment_NADA; Compartment_NADA*Competitie_inhibition_two_substrates_s2_const_scaling(NMNAT1_NaMN_1_E_T, NMNAT1_NaMN_1_scaling, NMNAT1_NaMN_1_kcat_A, NaMN_Compartment_NADA, NMNAT1_NaMN_1_Km_A, NMNAT1_NaMN_1_kcat_PA, NaAD_Compartment_NADA, NMNAT1_NaMN_1_Km_PA, NMN_Compartment_NADA, NMNAT1_NaMN_1_Km_B, NAD_Compartment_NADA, NMNAT1_NaMN_1_Km_PB); NMNAT1_NaMN_1 is "NMNAT1-NaMN[1]";  // modifiers: NMN_Compartment_NADA, NAD_Compartment_NADA; ec-code:2.7.7.18; ec-code:2.7.7.1; isDescribedBy pubmed:16118205; isDescribedBy doi:10.1016/0003-9861(67)90262-7
    NMNAT1_NaMN_1_E_T = 100; NMNAT1_NaMN_1_scaling = 0.001; NMNAT1_NaMN_1_kcat_A = 42.9; NMNAT1_NaMN_1_Km_A = 0.0677; NMNAT1_NaMN_1_kcat_PA = 103.8; NMNAT1_NaMN_1_Km_PA = 0.502; NMNAT1_NaMN_1_Km_B = 22.3; NMNAT1_NaMN_1_Km_PB = 0.059;
  NADS_1: NaAD_Compartment_NADA + $ATP_Compartment_NADA + $Gln_Compartment_NADA + $H2O_Compartment_NADA => $Glu_Compartment_NADA + NAD_Compartment_NADA + $PPi_Compartment_NADA + $AMP_Compartment_NADA; Compartment_NADA*TwosubstratesMMs2constant(NADS_1_E_T, NADS_1_turnover, NaAD_Compartment_NADA, ATP_Compartment_NADA, NADS_1_scaling, NADS_1_Km); NADS_1 is "NADS[1]";  // ec-code:6.3.5.1; isDescribedBy pubmed:4340699
    NADS_1_E_T = 10; NADS_1_turnover = 21; NADS_1_scaling = 0.001; NADS_1_Km = 0.19;
  // KM and Kcat for CN-III
  NT5_NMN_1: NMN_Compartment_NADA + $H2O_Compartment_NADA => NR_Compartment_NADA; Compartment_NADA*MM_with_ET_and_scaling(NT5_NMN_1_ET, NT5_NMN_1_scaling, NT5_NMN_1_kcat, NMN_Compartment_NADA, NT5_NMN_1_Km); NT5_NMN_1 is "NT5-NMN[1]";  // isDescribedBy pubmed:26385918
    NT5_NMN_1_ET = 10; NT5_NMN_1_scaling = 0.001; NT5_NMN_1_kcat = 0.5; NT5_NMN_1_Km = 5;
  PNP_NR_1: NR_Compartment_NADA + $Pi_Compartment_NADA => NAM_Compartment_NADA; Compartment_NADA*TwosubstratesMMs2constant(PNP_NR_1_E_T, PNP_NR_1_turnover, NR_Compartment_NADA, Pi_Compartment_NADA, PNP_NR_1_scaling, PNP_NR_1_Km); PNP_NR_1 is "PNP-NR[1]";  // modifiers: NAR_Compartment_NADA; isDescribedBy pubmed:9030766; isDescribedBy doi:10.1016/S0163-7258(00)00097-8
    PNP_NR_1_E_T = 10; PNP_NR_1_turnover = 40; PNP_NR_1_scaling = 0.001; PNP_NR_1_Km = 1.48;
  Nam_efflux_1: NAM_Compartment_NADA => ; Compartment_NADA*celldivision_compartment_NADA*NAM_Compartment_NADA; Nam_efflux_1 is "Nam-efflux[1]";
  // Km and Kcat from CN-II
  NT5_NaMN_1: NaMN_Compartment_NADA + $H2O_Compartment_NADA => NAR_Compartment_NADA; Compartment_NADA*MM_with_ET_and_scaling(NT5_NaMN_1_ET, NT5_NaMN_1_scaling, NT5_NaMN_1_kcat, NaMN_Compartment_NADA, NT5_NaMN_1_Km); NT5_NaMN_1 is "NT5-NaMN[1]";  // isDescribedBy pubmed:26385918
    NT5_NaMN_1_ET = 10; NT5_NaMN_1_scaling = 0.001; NT5_NaMN_1_kcat = 2.8; NT5_NaMN_1_Km = 3.5;
  SIRT_1: NAD_Compartment_NADA + $H3_ac_Compartment_NADA => NAM_Compartment_NADA + $H3_deac_Compartment_NADA; Compartment_NADA*Product_inhibition_two_susbtrates_s2_const_scaling(SIRT_1_ET, SIRT_1_scaling, SIRT_1_Kcat, NAD_Compartment_NADA, H3_ac_Compartment_NADA, SIRT_1_Km, NAM_Compartment_NADA, SIRT_1_Ki); SIRT_1 is "SIRT[1]";  // isDescribedBy doi:10.1021/bi049592e
    SIRT_1_ET = 10; SIRT_1_scaling = 0.001; SIRT_1_Kcat = 0.67; SIRT_1_Km = 0.029; SIRT_1_Ki = 0.06;
  NAD_consumption_without_Nam_inhibition_1: NAD_Compartment_NADA => NAM_Compartment_NADA; Compartment_NADA*MM_with_ET_and_scaling(NAD_consumption_without_Nam_inhibition_1_ET, NAD_consumption_without_Nam_inhibition_1_scaling, NAD_consumption_without_Nam_inhibition_1_kcat, NAD_Compartment_NADA, NAD_consumption_without_Nam_inhibition_1_Km); NAD_consumption_without_Nam_inhibition_1 is "NAD-consumption without Nam inhibition[1]";
    NAD_consumption_without_Nam_inhibition_1_ET = 0; NAD_consumption_without_Nam_inhibition_1_scaling = 0.001; NAD_consumption_without_Nam_inhibition_1_kcat = 1; NAD_consumption_without_Nam_inhibition_1_Km = 1;
  NADA_1: NAM_Compartment_NADA + $H2O_Compartment_NADA => NA_Compartment_NADA; Compartment_NADA*Product_inhibition_scaling(NADA_1_ET, NADA_1_scaling, NADA_1_Kcat, NAM_Compartment_NADA, NADA_1_Km, NA_Compartment_NADA, NADA_1_Ki); NADA_1 is "NADA[1]";  // isPartOf ec-code:3.5.1.19; isDescribedBy pubmed:22229411; isDescribedBy pubmed:3036844
    NADA_1_ET = 100; NADA_1_scaling = 0.001; NADA_1_Kcat = 0.69; NADA_1_Km = 0.009; NADA_1_Ki = 0.1;
  // cell size HeLa 3e-12 l
  // fibro blast 1e-12l
  // maximal E. coli uptake NA http://www.jbc.org/content/248/14/5144.full.pdf 630 molceules per cell and s
  // thus approx. 1 miktoM/ls
  // HeLa (epithelial; 8.2 ± 0.3 fmol/10 min),
  // NIH-3T3 cells : The apparent Km of NAD transport was ∼190 μM while the Vmax was 429 pmol/well/10 min.
  // http://www.jbc.org/content/283/10/6367.full
  // (1.2e6 cells per well according to thermo fisher cell culture specifications)
  // thus approx. 0.2 mikroM/s
  // 15mg uptake per 60kg body = 2.5e-8 mmol/ls
  NAM_import_1: Nam_ex -> NAM_Compartment_NADA; Compartment_NADA*(Nam_transporter*Nam_ex - Nam_transporter*NAM_Compartment_NADA); NAM_import_1 is "NAM import[1]";
  NAMPT_1: NAM_Compartment_NADA + $PRPP_Compartment_NADA => NMN_Compartment_NADA + $Pi_Compartment_NADA; Compartment_NADA*Competitive_inhibition_scaling(NAMPT_1_ET, NAMPT_1_scaling, Kcat_NamPT, NAM_Compartment_NADA, Km_NamPT, NAD_Compartment_NADA, NAMPT_1_Ki); NAMPT_1 is "NAMPT[1]";  // modifiers: NAD_Compartment_NADA
    NAMPT_1_ET = 0; NAMPT_1_scaling = 0.001; NAMPT_1_Ki = 0.0021;
  NAR_efflux_1: NAR_Compartment_NADA => ; Compartment_NADA*celldivision_compartment_NADA*NAR_Compartment_NADA; NAR_efflux_1 is "NAR-efflux[1]";
  NA_efflux_1: NA_Compartment_NADA => ; Compartment_NADA*celldivision_compartment_NADA*NA_Compartment_NADA; NA_efflux_1 is "NA-efflux[1]";
  NAD_binding_1: NAD_Compartment_NADA -> NADbound_Compartment_NADA; Compartment_NADA*(NAD_binding_1_k1*NAD_Compartment_NADA - NAD_binding_1_k2*NADbound_Compartment_NADA); NAD_binding_1 is "NAD-binding[1]";
    NAD_binding_1_k1 = 1; NAD_binding_1_k2 = 0.1;
  // Kcat calculated from vmax of purified enzyme (600nmol/min*mg) using an MW of 23193 g/mol for NMN
  NRK1_NaMN_1: NAR_Compartment_NADA => NaMN_Compartment_NADA; Compartment_NADA*MM_with_ET_and_scaling(NRK1_NaMN_1_ET, NRK1_NaMN_1_scaling, NRK1_NaMN_1_kcat, NAR_Compartment_NADA, NRK1_NaMN_1_Km); NRK1_NaMN_1 is "NRK1-NaMN[1]";  // modifiers: NR_Compartment_NADA; isDescribedBy pubmed:19027704
    NRK1_NaMN_1_ET = 10; NRK1_NaMN_1_scaling = 0.001; NRK1_NaMN_1_kcat = 0.23; NRK1_NaMN_1_Km = 0.0034;
  // Parameter have to be adjusted for NAR...currently NR affinities are used
  PNP_NAR_1: NAR_Compartment_NADA + $Pi_Compartment_NADA => NA_Compartment_NADA; Compartment_NADA*TwosubstratesMMs2constant(PNP_NAR_1_E_T, PNP_NAR_1_turnover, NAR_Compartment_NADA, Pi_Compartment_NADA, PNP_NAR_1_scaling, PNP_NAR_1_Km); PNP_NAR_1 is "PNP-NAR[1]";  // modifiers: NR_Compartment_NADA; isDescribedBy doi:10.1016/S0163-7258(00)00097-8; isDescribedBy pubmed:9030766
    PNP_NAR_1_E_T = 10; PNP_NAR_1_turnover = 40; PNP_NAR_1_scaling = 0.001; PNP_NAR_1_Km = 1.48;
  NR_efflux_1: NR_Compartment_NADA => ; Compartment_NADA*celldivision_compartment_NADA*NR_Compartment_NADA; NR_efflux_1 is "NR-efflux[1]";
  // Kcat calculated from vmax of purified enzyme (600nmol/min*mg) using an MW of 23193 g/mol
  NRK1_NMN_1: NR_Compartment_NADA => NMN_Compartment_NADA; Compartment_NADA*MM_with_ET_and_scaling(NRK1_NMN_1_ET, NRK1_NMN_1_scaling, NRK1_NMN_1_kcat, NR_Compartment_NADA, NRK1_NMN_1_Km); NRK1_NMN_1 is "NRK1-NMN[1]";  // modifiers: NAR_Compartment_NADA; isDescribedBy pubmed:19027704
    NRK1_NMN_1_ET = 10; NRK1_NMN_1_scaling = 0.001; NRK1_NMN_1_kcat = 0.23; NRK1_NMN_1_Km = 0.0034;
  NAD_efflux_0: NAD_Copartment_NamPT => ; Copartment_NamPT*celldivision_compartment_NamPT*NAD_Copartment_NamPT; NAD_efflux_0 is "NAD-efflux[0]";
  NAD_efflux_1: NAD_Copartment_NamPT => ; Copartment_NamPT*celldivision_compartment_NADA*NAD_Copartment_NamPT; NAD_efflux_1 is "NAD-efflux[1]";
  // cell size HeLa 3e-12 l
  // fibro blast 1e-12l
  // maximal E. coli uptake NA http://www.jbc.org/content/248/14/5144.full.pdf 630 molceules per cell and s
  // thus approx. 1 miktoM/ls
  // HeLa (epithelial; 8.2 ± 0.3 fmol/10 min),
  // NIH-3T3 cells : The apparent Km of NAD transport was ∼190 μM while the Vmax was 429 pmol/well/10 min.
  // http://www.jbc.org/content/283/10/6367.full
  // (1.2e6 cells per well according to thermo fisher cell culture specifications)
  // thus approx. 0.2 mikroM/s
  // 15mg uptake per 60kg body = 2.5e-8 mmol/ls
  Nam_uptake: => Nam_ex; Compartment_NADA*Constant_flux__irreversible(v);
    v = 1e-5;

  // Unit definitions:
  unit length = metre;
  unit area = metre^2;
  unit volume = litre;
  unit time = second;
  unit substance = 1e-3 mole;
end
